# OpenSim document version 40000
Model tennis_fullbody_model:
  gravity: 0 -9.80665 0
  credits: Julie Emmerson
  length_units: meters
  force_units: N
  Ground
  BodySet:
    Body pelvis: mass=8.0424 [kg] mass_center=(-0.0707 0 0) inertia=(0.01504241 0.01707224 0.01873978 0 0 0)
        meshes=(r_pelvis.vtp l_pelvis.vtp sacrum.vtp)
    Body femur_r: mass=10.1952 mass_center=(0 -0.1670596 0) inertia=(0.1836634 0.03767068 0.1836634 0 0 0)
        meshes=femur_r.vtp
    Body tibia_r: mass=3.1176 mass_center=(0 -0.1767838 0) inertia=(0.0303829 0.005198822 0.03186478 0 0 0)
        meshes=(tibia_r.vtp r_fibula.vtp)
    Body patella_r: mass=0 mass_center=(0.0018 0.0264 0) inertia=(0 0 0 0 0 0) meshes=r_patella.vtp
    Body talus_r: mass=0 mass_center=(0 0 0) inertia=(0 0 0 0 0 0) meshes=r_talus.vtp
    Body calcn_r: mass=0.9864 mass_center=(0.0894 0 0) inertia=(0.002082832 0.001892868 0.0004848769 0 0 0)
        meshes=r_foot.vtp
    Body toes_r: mass=0.01 mass_center=(0 0 0) inertia=(1e-5 1e-5 1e-5 0 0 0) meshes=r_bofoot.vtp
    Body femur_l: mass=10.1952 mass_center=(0 -0.1670596 0) inertia=(0.1836634 0.03767068 0.1836634 0 0 0)
        meshes=femur_l.vtp
    Body tibia_l: mass=3.1176 mass_center=(0 -0.1767838 0) inertia=(0.0303829 0.005198822 0.03186478 0 0 0)
        meshes=(tibia_l.vtp l_fibula.vtp)
    Body patella_l: mass=0 mass_center=(0 0 0) inertia=(0 0 0 0 0 0) meshes=l_patella.vtp
    Body talus_l: mass=0 mass_center=(0 0 0) inertia=(0 0 0 0 0 0) meshes=l_talus.vtp
    Body calcn_l: mass=0.9864 mass_center=(0.0894 0 0) inertia=(0.002082832 0.001892868 0.0004848769 0 0 0)
        meshes=l_foot.vtp
    Body toes_l: mass=0.01 mass_center=(0 0 0) inertia=(1e-5 1e-5 1e-5 0 0 0) meshes=l_bofoot.vtp
    Body spine: mass=23.2488 mass_center=(0 0.2237793 0) inertia=(0.1468291 0.2612477 0.2941418 0 0 0)
        meshes=tlspine.vtp
    Body torso: mass=0 mass_center=(0.02 0.12 0) inertia=(0 0 0 0 0 0) meshes=thorax.vtp
      WrapEllipsoid ScapulothoracicEllipsoid_r: active=false translation=(-0.02 -0.0173 0.0609) quadrant=all
          dimensions=(0.07 0.15 0.07)
      WrapEllipsoid ScapulothoracicEllipsoid_l: active=false translation=(-0.02 -0.0173 -0.0609) quadrant=all
          dimensions=(0.07 0.15 0.07)
    Body clavicle_r: mass=0 mass_center=(-0.03 0.0167 0.0983) inertia=(0 0 0 0 0 0) meshes=rclavicle.vtp
    Body clavicle_l: mass=0 mass_center=(-0.03 0.0167 -0.0983) inertia=(0 0 0 0 0 0) meshes=lclavicle.vtp
    Body scapula_l: mass=0 mass_center=(-0.0552994 -0.06105 0.0300854) inertia=(0 0 0 0 0 0) meshes=lscapula.vtp
    Body scapula_r: mass=0 mass_center=(-0.0552994 -0.06105 -0.0300854) inertia=(0 0 0 0 0 0) meshes=rscapula.vtp
    Body humerus_r: mass=1.9512 mass_center=(0 -0.1652368 0) inertia=(0.0115709 0.003991873 0.0129883 0 0 0)
        meshes=humerus_rv.vtp
    Body ulna_r: mass=0 mass_center=(0 -0.120525 0) inertia=(0 0 0 0 0 0) meshes=ulna_rv.vtp
    Body radius_r: mass=1.1664 mass_center=(0 -0.1078737 0) inertia=(0.004555939 0.000949854 0.004942018 0 0 0)
        meshes=radius_rv.vtp
    Body hand_r: mass=0.4392 mass_center=(0 0 0) inertia=(1e-5 1e-5 1e-5 0 0 0)
        meshes=(pisiform_rvs.vtp lunate_rvs.vtp scaphoid_rvs.vtp triquetrum_rvs.vtp hamate_rvs.vtp capitate_rvs.vtp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)
    Body humerus_l: mass=1.9512 mass_center=(0 -0.1652368 0) inertia=(0.0115709 0.003991873 0.0129883 0 0 0)
        meshes=humerus_lv.vtp
    Body ulna_l: mass=0 mass_center=(0 -0.120525 0) inertia=(0 0 0 0 0 0) meshes=ulna_lv.vtp
    Body radius_l: mass=1.1664 mass_center=(0 -0.1078737 0) inertia=(0.004555939 0.000949854 0.004942018 0 0 0)
        meshes=radius_lv.vtp
    Body hand_l: mass=0.4392 mass_center=(0 0 0) inertia=(1e-5 1e-5 1e-5 0 0 0)
        meshes=(pisiform_lvs.vtp lunate_lvs.vtp scaphoid_lvs.vtp triquetrum_lvs.vtp hamate_lvs.vtp capitate_lvs.vtp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)
    Body cerv7: mass=0 mass_center=(-0.0002 0.0071 0) inertia=(0 0 0 0 0 0) meshes=rotatedcerv7.vtp
    Body cerv6: mass=0 mass_center=(0.0002 0.0064 0) inertia=(0 0 0 0 0 0) meshes=cerv6.vtp
    Body cerv5: mass=0 mass_center=(0.0001 0.0063 0) inertia=(0 0 0 0 0 0) meshes=cerv5.vtp
    Body cerv4: mass=0 mass_center=(-0.0003 0.0067 0) inertia=(0 0 0 0 0 0) meshes=cerv4.vtp
    Body cerv3: mass=0 mass_center=(-0.0008 0.0071 0) inertia=(0 0 0 0 0 0) meshes=cerv3.vtp
    Body cerv2: mass=0 mass_center=(-0.001 0.0059 0) inertia=(0 0 0 0 0 0) meshes=cerv2.vtp
    Body cerv1: mass=0 mass_center=(0.0312 0.0019 0) inertia=(0 0 0 0 0 0) meshes=cerv1.vtp
    Body skull: mass=4.9968 mass_center=(0 0.0676 0) inertia=(0.02632841 0.008092804 0.02839293 0 0 0) meshes=skull.vtp
    Body jaw: mass=0 mass_center=(0 0.05 0) inertia=(0 0 0 0 0 0) meshes=jaw.vtp
  JointSet:
    CustomJoint ground_pelvis: socket_parent_frame=ground_offset socket_child_frame=pelvis_offset
      Coordinate pelvis_tilt: default_value=0 range=(-1.570796 1.570796) clamped=true
      Coordinate pelvis_list: default_value=0 range=(-1.570796 1.570796) clamped=true
      Coordinate pelvis_rotation: default_value=0 range=(-3.1416 3.1416) clamped=false
      Coordinate pelvis_tx: default_value=0 range=(-5 5) clamped=false
      Coordinate pelvis_ty: default_value=4.480827e-11 range=(-1 2) clamped=true
      Coordinate pelvis_tz: default_value=0 range=(-5 5) clamped=false
      PhysicalOffsetFrame ground_offset: socket_parent=/ground translation=(0 0 0) [meters]
      PhysicalOffsetFrame pelvis_offset: socket_parent=/bodyset/pelvis translation=(0 0 0)
      SpatialTransform:
        TransformAxis rotation1: coordinates=pelvis_tilt axis=(0 0 1) LinearFunction(coefficients=1 0)
        TransformAxis rotation2: coordinates=pelvis_list axis=(1 0 0) LinearFunction(coefficients=1 0)
        TransformAxis rotation3: coordinates=pelvis_rotation axis=(0 1 0) LinearFunction(coefficients=1 0)
        TransformAxis translation1: coordinates=pelvis_tx axis=(1 0 0) LinearFunction(coefficients=1 0)
        TransformAxis translation2: coordinates=pelvis_ty axis=(0 1 0) LinearFunction(coefficients=1 0)
        TransformAxis translation3: coordinates=pelvis_tz axis=(0 0 1) LinearFunction(coefficients=1 0)
    CustomJoint hip_r: socket_parent_frame=pelvis_offset socket_child_frame=femur_r_offset
      Coordinate hip_flexion_r: default_value=7.72603e-8 range=(-0.5235988 2.356194) clamped=true
      Coordinate hip_adduction_r: default_value=-0.1047198 range=(-0.8726646 0.5235988) clamped=true
      Coordinate hip_rotation_r: default_value=0 range=(-0.7853982 0.7853982) clamped=true
      PhysicalOffsetFrame pelvis_offset: socket_parent=/bodyset/pelvis translation=(-0.056276 -0.07849 0.07726)
      PhysicalOffsetFrame femur_r_offset: socket_parent=/bodyset/femur_r translation=(0 0 0)
      SpatialTransform: axes_held_at_zero=(translation1 translation2 translation3)
        TransformAxis rotation1: coordinates=hip_flexion_r axis=(0 0 1) LinearFunction(coefficients=1 0)
        TransformAxis rotation2: coordinates=hip_adduction_r axis=(1 0 0) LinearFunction(coefficients=1 0)
        TransformAxis rotation3: coordinates=hip_rotation_r axis=(0 1 0) LinearFunction(coefficients=1 0)
    CustomJoint walker_knee_r: socket_parent_frame=femur_r_offset socket_child_frame=tibia_r_offset
      Coordinate knee_angle_r: default_value=0.0003127011 range=(0 2.617994) clamped=true
      PhysicalOffsetFrame femur_r_offset: socket_parent=/bodyset/femur_r translation=(-0.00809 -0.40796 -0.00275)
          orientation=(-1.64157 1.44618 1.5708) [radians]
      PhysicalOffsetFrame tibia_r_offset: socket_parent=/bodyset/tibia_r
          translation=(-0.00808954 -0.0035348 -0.00148474) orientation=(-1.64157 1.44618 1.5708)
      SpatialTransform: axes_held_at_zero=translation3
        TransformAxis rotation1: coordinates=knee_angle_r axis=(1 0 0) LinearFunction(coefficients=1 0)
        TransformAxis rotation2: coordinates=knee_angle_r axis=(0 0 1)
          SimmSpline: x=(0 0.174533 0.349066 0.523599 0.698132 0.872665 1.0472 1.22173 1.39626 1.5708 1.74533 1.91986 2.0944)
              y=(0 0.0126809 0.0226969 0.0296054 0.0332049 0.0335354 0.0308779 0.0257548 0.0189295 0.011407 0.00443314 -0.00050475 -0.0016782)
        TransformAxis rotation3: coordinates=knee_angle_r axis=(0 1 0)
          SimmSpline: x=(0 0.174533 0.349066 0.523599 0.698132 0.872665 1.0472 1.22173 1.39626 1.5708 1.74533 1.91986 2.0944)
              y=(0 0.059461 0.109399 0.150618 0.18392 0.210107 0.229983 0.24435 0.254012 0.25977 0.262428 0.262788 0.261654)
        TransformAxis translation1: coordinates=knee_angle_r axis=(0 1 0)
          MultiplierFunction: scale=1
            SimmSpline: x=(0 0.174533 0.349066 0.523599 0.698132 0.872665 1.0472 1.22173 1.39626 1.5708 1.74533 1.91986 2.0944)
                y=(0 0.000479 0.000835 0.001086 0.001251 0.001346 0.001391 0.001403 0.0014 0.0014 0.001421 0.001481 0.001599)
        TransformAxis translation2: coordinates=knee_angle_r axis=(0 0 1)
          MultiplierFunction: scale=1
            SimmSpline: x=(0 0.174533 0.349066 0.523599 0.698132 0.872665 1.0472 1.22173 1.39626 1.5708 1.74533 1.91986 2.0944)
                y=(0 0.000988 0.001899 0.002734 0.003492 0.004173 0.004777 0.005305 0.005756 0.00613 0.006427 0.006648 0.006792)
    CustomJoint patellofemoral_r: socket_parent_frame=femur_r_offset socket_child_frame=patella_r_offset
      Coordinate knee_angle_r_beta: default_value=0.0003127011 range=(-99999.9 99999.9) clamped=false
      PhysicalOffsetFrame femur_r_offset: socket_parent=/bodyset/femur_r translation=(-0.00809 -0.40796 -0.00275)
      PhysicalOffsetFrame patella_r_offset: socket_parent=/bodyset/patella_r translation=(0 0 0)
      SpatialTransform: axes_held_at_zero=(rotation2 rotation3)
        TransformAxis rotation1: coordinates=knee_angle_r_beta axis=(0 0 1)
          SimmSpline: x=(0 0.174533 0.349066 0.523599 0.698132 0.872665 1.0472 1.22173 1.39626 1.5708 1.74533 1.91986 2.0944)
              y=(0.00113686 -0.00629212 -0.105582 -0.253683 -0.414245 -0.579047 -0.747244 -0.91799 -1.09044 -1.26379 -1.43763 -1.61186 -1.78634)
        TransformAxis translation1: coordinates=knee_angle_r_beta axis=(1 0 0)
          MultiplierFunction: scale=1
            SimmSpline: x=(0 0.174533 0.349066 0.523599 0.698132 0.872665 1.0472 1.22173 1.39626 1.5708 1.74533 1.91986 2.0944)
                y=(0.0524 0.0488 0.0437 0.0371 0.0296 0.0216 0.0136 0.0057 -0.0019 -0.0088 -0.0148 -0.0196 -0.0227)
        TransformAxis translation2: coordinates=knee_angle_r_beta axis=(0 1 0)
          MultiplierFunction: scale=1
            SimmSpline: x=(0 0.174533 0.349066 0.523599 0.698132 0.872665 1.0472 1.22173 1.39626 1.5708 1.74533 1.91986 2.0944)
                y=(-0.0108 -0.019 -0.0263 -0.0322 -0.0367 -0.0395 -0.0408 -0.0404 -0.0384 -0.0349 -0.0301 -0.0245 -0.0187)
        TransformAxis translation3: axis=(0 0 1) MultiplierFunction(scale=1, Constant(value=0.00275))
    PinJoint ankle_r: socket_parent_frame=tibia_r_offset socket_child_frame=talus_r_offset
      Coordinate ankle_angle_r: default_value=0 range=(-0.8726646 0.8726646) clamped=true
      PhysicalOffsetFrame tibia_r_offset: socket_parent=/bodyset/tibia_r translation=(-0.01 -0.4 0)
          orientation=(0.175895 -0.105208 0.0186622)
      PhysicalOffsetFrame talus_r_offset: socket_parent=/bodyset/talus_r translation=(0 0 0)
          orientation=(0.175895 -0.105208 0.0186622)
    PinJoint subtalar_r: socket_parent_frame=talus_r_offset socket_child_frame=calcn_r_offset
      Coordinate subtalar_angle_r: default_value=0.08726644 range=(-0.6108652 0.6108652) clamped=true
      PhysicalOffsetFrame talus_r_offset: socket_parent=/bodyset/talus_r translation=(-0.04877 -0.04195 0.00792)
          orientation=(-1.76819 0.906223 1.8196)
      PhysicalOffsetFrame calcn_r_offset: socket_parent=/bodyset/calcn_r translation=(0 0 0)
          orientation=(-1.76819 0.906223 1.8196)
    PinJoint mtp_r: socket_parent_frame=calcn_r_offset socket_child_frame=toes_r_offset
      Coordinate mtp_angle_r: default_value=-3.479658e-8 range=(-0.7854 0.5235988) clamped=true
      PhysicalOffsetFrame calcn_r_offset: socket_parent=/bodyset/calcn_r translation=(0.1788 -0.002 0.00108)
          orientation=(-3.14159 0.619901 0)
      PhysicalOffsetFrame toes_r_offset: socket_parent=/bodyset/toes_r translation=(0 0 0)
          orientation=(-3.14159 0.619901 0)
    CustomJoint hip_l: socket_parent_frame=pelvis_offset socket_child_frame=femur_l_offset
      Coordinate hip_flexion_l: default_value=7.72603e-8 range=(-0.5235988 2.356194) clamped=true
      Coordinate hip_adduction_l: default_value=-0.1047198 range=(-0.8726646 0.5235988) clamped=true
      Coordinate hip_rotation_l: default_value=0 range=(-0.7853982 0.7853982) clamped=true
      PhysicalOffsetFrame pelvis_offset: socket_parent=/bodyset/pelvis translation=(-0.056276 -0.07849 -0.07726)
      PhysicalOffsetFrame femur_l_offset: socket_parent=/bodyset/femur_l translation=(0 0 0)
      SpatialTransform: axes_held_at_zero=(translation1 translation2 translation3)
        TransformAxis rotation1: coordinates=hip_flexion_l axis=(0 0 1) LinearFunction(coefficients=1 0)
        TransformAxis rotation2: coordinates=hip_adduction_l axis=(1 0 0) LinearFunction(coefficients=-1 0)
        TransformAxis rotation3: coordinates=hip_rotation_l axis=(0 1 0) LinearFunction(coefficients=-1 0)
    CustomJoint walker_knee_l: socket_parent_frame=femur_l_offset socket_child_frame=tibia_l_offset
      Coordinate knee_angle_l: default_value=0.0003127011 range=(0 2.617994) clamped=true
      PhysicalOffsetFrame femur_l_offset: socket_parent=/bodyset/femur_l translation=(-0.00809 -0.40796 0.00275)
          orientation=(1.64157 -1.44618 1.5708)
      PhysicalOffsetFrame tibia_l_offset: socket_parent=/bodyset/tibia_l
          translation=(-0.00808954 -0.0035348 0.00148474) orientation=(1.64157 -1.44618 1.5708)
      SpatialTransform: axes_held_at_zero=translation3
        TransformAxis rotation1: coordinates=knee_angle_l axis=(-1 0 0) LinearFunction(coefficients=1 0)
        TransformAxis rotation2: coordinates=knee_angle_l axis=(0 0 1)
          SimmSpline: x=(0 0.174533 0.349066 0.523599 0.698132 0.872665 1.0472 1.22173 1.39626 1.5708 1.74533 1.91986 2.0944)
              y=(0 0.0126809 0.0226969 0.0296054 0.0332049 0.0335354 0.0308779 0.0257548 0.0189295 0.011407 0.00443314 -0.00050475 -0.0016782)
        TransformAxis rotation3: coordinates=knee_angle_l axis=(0 1 0)
          SimmSpline: x=(0 0.174533 0.349066 0.523599 0.698132 0.872665 1.0472 1.22173 1.39626 1.5708 1.74533 1.91986 2.0944)
              y=(0 -0.059461 -0.109399 -0.150618 -0.18392 -0.210107 -0.229983 -0.24435 -0.254012 -0.25977 -0.262428 -0.262788 -0.261654)
        TransformAxis translation1: coordinates=knee_angle_l axis=(0 1 0)
          MultiplierFunction: scale=1
            SimmSpline: x=(0 0.174533 0.349066 0.523599 0.698132 0.872665 1.0472 1.22173 1.39626 1.5708 1.74533 1.91986 2.0944)
                y=(0 0.000479 0.000835 0.001086 0.001251 0.001346 0.001391 0.001403 0.0014 0.0014 0.001421 0.001481 0.001599)
        TransformAxis translation2: coordinates=knee_angle_l axis=(0 0 1)
          MultiplierFunction: scale=1
            SimmSpline: x=(0 0.174533 0.349066 0.523599 0.698132 0.872665 1.0472 1.22173 1.39626 1.5708 1.74533 1.91986 2.0944)
                y=(0 -0.000988 -0.001899 -0.002734 -0.003492 -0.004173 -0.004777 -0.005305 -0.005756 -0.00613 -0.006427 -0.006648 -0.006792)
    CustomJoint patellofemoral_l: socket_parent_frame=femur_l_offset socket_child_frame=patella_l_offset
      Coordinate knee_angle_l_beta: default_value=0.0003127011 range=(-99999.9 99999.9) clamped=false
      PhysicalOffsetFrame femur_l_offset: socket_parent=/bodyset/femur_l translation=(-0.00809 -0.40796 0.00275)
      PhysicalOffsetFrame patella_l_offset: socket_parent=/bodyset/patella_l translation=(0 0 0)
      SpatialTransform: axes_held_at_zero=(rotation2 rotation3)
        TransformAxis rotation1: coordinates=knee_angle_l_beta axis=(0 0 1)
          SimmSpline: x=(0 0.174533 0.349066 0.523599 0.698132 0.872665 1.0472 1.22173 1.39626 1.5708 1.74533 1.91986 2.0944)
              y=(0.00113686 -0.00629212 -0.105582 -0.253683 -0.414245 -0.579047 -0.747244 -0.91799 -1.09044 -1.26379 -1.43763 -1.61186 -1.78634)
        TransformAxis translation1: coordinates=knee_angle_l_beta axis=(1 0 0)
          MultiplierFunction: scale=1
            SimmSpline: x=(0 0.174533 0.349066 0.523599 0.698132 0.872665 1.0472 1.22173 1.39626 1.5708 1.74533 1.91986 2.0944)
                y=(0.0524 0.0488 0.0437 0.0371 0.0296 0.0216 0.0136 0.0057 -0.0019 -0.0088 -0.0148 -0.0196 -0.0227)
        TransformAxis translation2: coordinates=knee_angle_l_beta axis=(0 1 0)
          MultiplierFunction: scale=1
            SimmSpline: x=(0 0.174533 0.349066 0.523599 0.698132 0.872665 1.0472 1.22173 1.39626 1.5708 1.74533 1.91986 2.0944)
                y=(-0.0108 -0.019 -0.0263 -0.0322 -0.0367 -0.0395 -0.0408 -0.0404 -0.0384 -0.0349 -0.0301 -0.0245 -0.0187)
        TransformAxis translation3: axis=(0 0 1) MultiplierFunction(scale=1, Constant(value=-0.00275))
    PinJoint ankle_l: socket_parent_frame=tibia_l_offset socket_child_frame=talus_l_offset
      Coordinate ankle_angle_l: default_value=0 range=(-0.8726646 0.8726646) clamped=true
      PhysicalOffsetFrame tibia_l_offset: socket_parent=/bodyset/tibia_l translation=(-0.01 -0.4 0)
          orientation=(-0.175895 0.105208 0.0186622)
      PhysicalOffsetFrame talus_l_offset: socket_parent=/bodyset/talus_l translation=(0 0 0)
          orientation=(-0.175895 0.105208 0.0186622)
    PinJoint subtalar_l: socket_parent_frame=talus_l_offset socket_child_frame=calcn_l_offset
      Coordinate subtalar_angle_l: default_value=0.08726644 range=(-0.6108652 0.6108652) clamped=true
      PhysicalOffsetFrame talus_l_offset: socket_parent=/bodyset/talus_l translation=(-0.04877 -0.04195 -0.00792)
          orientation=(1.76819 -0.906223 1.8196)
      PhysicalOffsetFrame calcn_l_offset: socket_parent=/bodyset/calcn_l translation=(0 0 0)
          orientation=(1.76819 -0.906223 1.8196)
    PinJoint mtp_l: socket_parent_frame=calcn_l_offset socket_child_frame=toes_l_offset
      Coordinate mtp_angle_l: default_value=-3.479658e-8 range=(-0.7854 0.5235988) clamped=true
      PhysicalOffsetFrame calcn_l_offset: socket_parent=/bodyset/calcn_l translation=(0.1788 -0.002 -0.00108)
          orientation=(-3.14159 -0.619901 0)
      PhysicalOffsetFrame toes_l_offset: socket_parent=/bodyset/toes_l translation=(0 0 0)
          orientation=(-3.14159 -0.619901 0)
    CustomJoint back: socket_parent_frame=pelvis_offset socket_child_frame=spine_offset
      Coordinate spine_tilt: default_value=0 range=(-1.0472 0.7854) clamped=true
      Coordinate spine_list: default_value=0 range=(-0.785 0.785) clamped=true
      Coordinate spine_rotation: default_value=-3.85186e-34 range=(-1.570796 1.570796) clamped=true
      PhysicalOffsetFrame pelvis_offset: socket_parent=/bodyset/pelvis translation=(-0.08 0 0)
      PhysicalOffsetFrame spine_offset: socket_parent=/bodyset/spine translation=(0 0 0)
      SpatialTransform: axes_held_at_zero=(translation1 translation2 translation3)
        TransformAxis rotation1: coordinates=spine_tilt axis=(0 0 1) LinearFunction(coefficients=1 0)
        TransformAxis rotation2: coordinates=spine_list axis=(1 0 0) LinearFunction(coefficients=1 0)
        TransformAxis rotation3: coordinates=spine_rotation axis=(0 1 0) LinearFunction(coefficients=1 0)
    WeldJoint ribcagejnt: socket_parent_frame=spine_offset socket_child_frame=torso_offset
      PhysicalOffsetFrame spine_offset: socket_parent=/bodyset/spine translation=(0 0.43095 0)
      PhysicalOffsetFrame torso_offset: socket_parent=/bodyset/torso translation=(0 0 0)
    CustomJoint auxt1jnt: socket_parent_frame=spine_offset socket_child_frame=cerv7_offset
      Coordinate pitch2: default_value=1.222063e-6 range=(-0.5759587 0.837758) clamped=true
      Coordinate roll2: default_value=-7.417425e-34 range=(-0.5759587 0.5759587) clamped=true
      Coordinate yaw2: default_value=-1.940732e-33 range=(-0.4712389 0.4712389) clamped=true
      PhysicalOffsetFrame spine_offset: socket_parent=/bodyset/spine translation=(-0.0475 0.454155 0)
      PhysicalOffsetFrame cerv7_offset: socket_parent=/bodyset/cerv7 translation=(0.00684 -0.005655 0)
      SpatialTransform: axes_held_at_zero=(translation1 translation2 translation3)
        TransformAxis rotation1: coordinates=pitch2 axis=(0 0 1)
          SimmSpline: x=(-1.74533 1.74533) y=(-0.172788 0.172788)
        TransformAxis rotation2: coordinates=roll2 axis=(1 0 0)
          SimmSpline: x=(-1.74533 1.74533) y=(-0.136136 0.136136)
        TransformAxis rotation3: coordinates=yaw2 axis=(0 1 0)
          SimmSpline: x=(-1.74533 1.74533) y=(-0.109956 0.109956)
    CustomJoint aux7jnt: socket_parent_frame=cerv7_offset socket_child_frame=cerv6_offset
      Coordinate aux7jnt_r3: default_value=2.285261e-7 range=(-99999.9 99999.9) clamped=false
      Coordinate aux7jnt_r1: default_value=0 range=(-99999.9 99999.9) clamped=false
      Coordinate aux7jnt_r2: default_value=0 range=(-99999.9 99999.9) clamped=false
      PhysicalOffsetFrame cerv7_offset: socket_parent=/bodyset/cerv7 translation=(0.013256 0.01238 0)
      PhysicalOffsetFrame cerv6_offset: socket_parent=/bodyset/cerv6 translation=(0.009419 -0.004065 0)
      SpatialTransform: axes_held_at_zero=(translation1 translation2 translation3)
        TransformAxis rotation1: coordinates=aux7jnt_r3 axis=(0 0 1) LinearFunction(coefficients=1 0)
        TransformAxis rotation2: coordinates=aux7jnt_r1 axis=(1 0 0) LinearFunction(coefficients=1 0)
        TransformAxis rotation3: coordinates=aux7jnt_r2 axis=(0 1 0) LinearFunction(coefficients=1 0)
    CustomJoint aux6jnt: socket_parent_frame=cerv6_offset socket_child_frame=cerv5_offset
      Coordinate aux6jnt_r3: default_value=2.688535e-7 range=(-99999.9 99999.9) clamped=false
      Coordinate aux6jnt_r1: default_value=0 range=(-99999.9 99999.9) clamped=false
      Coordinate aux6jnt_r2: default_value=0 range=(-99999.9 99999.9) clamped=false
      PhysicalOffsetFrame cerv6_offset: socket_parent=/bodyset/cerv6 translation=(0.00985 0.00975 0)
      PhysicalOffsetFrame cerv5_offset: socket_parent=/bodyset/cerv5 translation=(0.00567 -0.00815 0)
      SpatialTransform: axes_held_at_zero=(translation1 translation2 translation3)
        TransformAxis rotation1: coordinates=aux6jnt_r3 axis=(0 0 1) LinearFunction(coefficients=1 0)
        TransformAxis rotation2: coordinates=aux6jnt_r1 axis=(1 0 0) LinearFunction(coefficients=1 0)
        TransformAxis rotation3: coordinates=aux6jnt_r2 axis=(0 1 0) LinearFunction(coefficients=1 0)
    CustomJoint aux5jnt: socket_parent_frame=cerv5_offset socket_child_frame=cerv4_offset
      Coordinate aux5jnt_r3: default_value=2.688535e-7 range=(-99999.9 99999.9) clamped=false
      Coordinate aux5jnt_r1: default_value=0 range=(-99999.9 99999.9) clamped=false
      Coordinate aux5jnt_r2: default_value=0 range=(-99999.9 99999.9) clamped=false
      PhysicalOffsetFrame cerv5_offset: socket_parent=/bodyset/cerv5 translation=(0.00843 0.00745 0)
      PhysicalOffsetFrame cerv4_offset: socket_parent=/bodyset/cerv4 translation=(0.00502 -0.01172 0)
      SpatialTransform: axes_held_at_zero=(translation1 translation2 translation3)
        TransformAxis rotation1: coordinates=aux5jnt_r3 axis=(0 0 1) LinearFunction(coefficients=1 0)
        TransformAxis rotation2: coordinates=aux5jnt_r1 axis=(1 0 0) LinearFunction(coefficients=1 0)
        TransformAxis rotation3: coordinates=aux5jnt_r2 axis=(0 1 0) LinearFunction(coefficients=1 0)
    CustomJoint aux4jnt: socket_parent_frame=cerv4_offset socket_child_frame=cerv3_offset
      Coordinate aux4jnt_r3: default_value=2.016401e-7 range=(-99999.9 99999.9) clamped=false
      Coordinate aux4jnt_r1: default_value=0 range=(-99999.9 99999.9) clamped=false
      Coordinate aux4jnt_r2: default_value=0 range=(-99999.9 99999.9) clamped=false
      PhysicalOffsetFrame cerv4_offset: socket_parent=/bodyset/cerv4 translation=(0.00732 0.00638 0)
      PhysicalOffsetFrame cerv3_offset: socket_parent=/bodyset/cerv3 translation=(0.00471 -0.00902 0)
      SpatialTransform: axes_held_at_zero=(translation1 translation2 translation3)
        TransformAxis rotation1: coordinates=aux4jnt_r3 axis=(0 0 1) LinearFunction(coefficients=1 0)
        TransformAxis rotation2: coordinates=aux4jnt_r1 axis=(1 0 0) LinearFunction(coefficients=1 0)
        TransformAxis rotation3: coordinates=aux4jnt_r2 axis=(0 1 0) LinearFunction(coefficients=1 0)
    CustomJoint aux3jnt: socket_parent_frame=cerv3_offset socket_child_frame=cerv2_offset
      Coordinate aux3jnt_r3: default_value=1.344268e-7 range=(-99999.9 99999.9) clamped=false
      Coordinate aux3jnt_r1: default_value=0 range=(-99999.9 99999.9) clamped=false
      Coordinate aux3jnt_r2: default_value=0 range=(-99999.9 99999.9) clamped=false
      PhysicalOffsetFrame cerv3_offset: socket_parent=/bodyset/cerv3 translation=(0.00525 0.00506 0)
      PhysicalOffsetFrame cerv2_offset: socket_parent=/bodyset/cerv2 translation=(0.00543 -0.01123 0)
      SpatialTransform: axes_held_at_zero=(translation1 translation2 translation3)
        TransformAxis rotation1: coordinates=aux3jnt_r3 axis=(0 0 1) LinearFunction(coefficients=1 0)
        TransformAxis rotation2: coordinates=aux3jnt_r1 axis=(1 0 0) LinearFunction(coefficients=1 0)
        TransformAxis rotation3: coordinates=aux3jnt_r2 axis=(0 1 0) LinearFunction(coefficients=1 0)
    CustomJoint aux2jnt: socket_parent_frame=cerv2_offset socket_child_frame=cerv1_offset
      Coordinate pitch1: default_value=1.630955e-6 range=(-0.2792527 0.418879) clamped=true
      Coordinate roll1: default_value=-1.889405e-33 range=(-0.1047198 0.1047198) clamped=true
      Coordinate yaw1: default_value=1.274842e-34 range=(-0.6632251 0.6632251) clamped=true
      PhysicalOffsetFrame cerv2_offset: socket_parent=/bodyset/cerv2 translation=(0.00689 0.02128 0)
      PhysicalOffsetFrame cerv1_offset: socket_parent=/bodyset/cerv1 translation=(0.04245 0.00352 0)
      SpatialTransform: axes_held_at_zero=(translation1 translation2 translation3)
        TransformAxis rotation1: coordinates=pitch1 axis=(0 0 1)
          SimmSpline: x=(-1.74533 1.74533) y=(-0.774926 0.774926)
        TransformAxis rotation2: coordinates=roll1 axis=(1 0 0)
          SimmSpline: x=(-1.74533 1.74533) y=(-0.872665 0.872665)
        TransformAxis rotation3: coordinates=yaw1 axis=(0 1 0)
          SimmSpline: x=(-1.74533 1.74533) y=(-1.5516 1.5516)
    CustomJoint aux1jnt: socket_parent_frame=cerv1_offset socket_child_frame=skull_offset
      Coordinate aux1jnt_r3: default_value=9.068103e-7 range=(-99999.9 99999.9) clamped=false
      Coordinate aux1jnt_r1: default_value=0 range=(-99999.9 99999.9) clamped=false
      Coordinate aux1jnt_r2: default_value=0 range=(-99999.9 99999.9) clamped=false
      PhysicalOffsetFrame cerv1_offset: socket_parent=/bodyset/cerv1 translation=(0.04335 0.01492 0)
      PhysicalOffsetFrame skull_offset: socket_parent=/bodyset/skull translation=(0 0 0)
      SpatialTransform: axes_held_at_zero=(translation1 translation2 translation3)
        TransformAxis rotation1: coordinates=aux1jnt_r3 axis=(0 0 1) LinearFunction(coefficients=1 0)
        TransformAxis rotation2: coordinates=aux1jnt_r1 axis=(1 0 0) LinearFunction(coefficients=1 0)
        TransformAxis rotation3: coordinates=aux1jnt_r2 axis=(0 1 0) LinearFunction(coefficients=1 0)
    WeldJoint jawjnt: socket_parent_frame=skull_offset socket_child_frame=jaw_offset
      PhysicalOffsetFrame skull_offset: socket_parent=/bodyset/skull translation=(0 0 0)
      PhysicalOffsetFrame jaw_offset: socket_parent=/bodyset/jaw translation=(0 0 0)
    CustomJoint sternoclavicular_r: socket_parent_frame=torso_offset socket_child_frame=clavicle_r_offset
      Coordinate clav_prot_r: default_value=-4.628822e-19 range=(-0.5236 0.5236) clamped=true
      Coordinate clav_elev_r: default_value=1.622365e-18 range=(-0.5236 0.5236) clamped=true
      PhysicalOffsetFrame torso_offset: socket_parent=/bodyset/torso translation=(0.006325 0.00693 0.025465)
      PhysicalOffsetFrame clavicle_r_offset: socket_parent=/bodyset/clavicle_r translation=(0 0 0)
      SpatialTransform: axes_held_at_zero=(rotation3 translation1 translation2 translation3)
        TransformAxis rotation1: coordinates=clav_prot_r axis=(0.0153 0.9892987 -0.1451)
            LinearFunction(coefficients=1 0)
        TransformAxis rotation2: coordinates=clav_elev_r axis=(-0.9944725 0 -0.104997) LinearFunction(coefficients=1 0)
    CustomJoint sternoclavicular_l: socket_parent_frame=torso_offset socket_child_frame=clavicle_l_offset
      Coordinate clav_prot_l: default_value=-0.0004606662 range=(-0.5236 0.5236) clamped=true
      Coordinate clav_elev_l: default_value=0.0003651896 range=(-0.5236 0.5236) clamped=true
      PhysicalOffsetFrame torso_offset: socket_parent=/bodyset/torso translation=(0.006325 0.00693 -0.025465)
      PhysicalOffsetFrame clavicle_l_offset: socket_parent=/bodyset/clavicle_l translation=(0 0 0)
      SpatialTransform: axes_held_at_zero=(rotation3 translation1 translation2 translation3)
        TransformAxis rotation1: coordinates=clav_prot_l axis=(-0.0153 -0.989299 -0.1451)
            LinearFunction(coefficients=1 0)
        TransformAxis rotation2: coordinates=clav_elev_l axis=(0.994473 0 -0.104997) LinearFunction(coefficients=1 0)
    ScapulothoracicJoint scapulothoracic_r: socket_parent_frame=torso_offset socket_child_frame=scapula_r_offset
        thoracic_ellipsoid_radii_x_y_z=(0.07 0.15 0.07) scapula_winging_axis_origin=(0 0)
        scapula_winging_axis_direction=0 [radians]
      Coordinate scapula_abduction_r: default_value=0 range=(-0.7853982 0.7853982) clamped=true
      Coordinate scapula_elevation_r: default_value=0 range=(-0.7853982 0.7853982) clamped=true
      Coordinate scapula_upward_rot_r: default_value=0 range=(-0.7853982 0.7853982) clamped=true
      Coordinate scapula_winging_r: default_value=0 range=(-0.7853982 0.7853982) clamped=false
      PhysicalOffsetFrame torso_offset: socket_parent=/bodyset/torso translation=(-0.02 -0.0173 0.07)
          orientation=(0 -0.87 0)
      PhysicalOffsetFrame scapula_r_offset: socket_parent=/bodyset/scapula_r translation=(-0.05982 -0.03904 -0.056)
          orientation=(-0.5181 -1.1416 -0.2854)
    ScapulothoracicJoint scapulothoracic_l: socket_parent_frame=torso_offset socket_child_frame=scapula_l_offset
        thoracic_ellipsoid_radii_x_y_z=(0.07 0.15 0.07) scapula_winging_axis_origin=(0 0)
        scapula_winging_axis_direction=0
      Coordinate scapula_abduction_l: default_value=-8.658108e-10 range=(-0.7853982 0.7853982) clamped=true
      Coordinate scapula_elevation_l: default_value=-1.101751e-9 range=(-0.7853982 0.7853982) clamped=true
      Coordinate scapula_upward_rot_l: default_value=2.24023e-9 range=(-0.7853982 0.7853982) clamped=true
      Coordinate scapula_winging_l: default_value=1.007745e-9 range=(-0.7853982 0.7853982) clamped=false
      PhysicalOffsetFrame torso_offset: socket_parent=/bodyset/torso translation=(-0.02 -0.0173 -0.07)
          orientation=(0 4.01 0)
      PhysicalOffsetFrame scapula_l_offset: socket_parent=/bodyset/scapula_l translation=(-0.05982 -0.03904 0.056)
          orientation=(-2.63319 -1.14 -2.86319)
    CustomJoint glenohumeral_r: socket_parent_frame=scapula_r_offset socket_child_frame=humerus_r_offset
      Coordinate shoulder_elv_r: default_value=0.4363323 range=(-1.570796 2.53) clamped=true
      Coordinate plane_of_elev_r: default_value=1.255647e-8 range=(-1.570796 3.141593) clamped=true
      Coordinate axial_rot_r: default_value=2.264163e-11 range=(-3.141593 3.141593) clamped=true
      PhysicalOffsetFrame scapula_r_offset: socket_parent=/bodyset/scapula_r translation=(-0.00955 -0.034 0.009)
      PhysicalOffsetFrame humerus_r_offset: socket_parent=/bodyset/humerus_r translation=(0 0 0)
      SpatialTransform: axes_held_at_zero=(translation1 translation2 translation3)
        TransformAxis rotation1: coordinates=shoulder_elv_r axis=(-0.993 -0.0793 0.0879)
            LinearFunction(coefficients=1 0)
        TransformAxis rotation2: coordinates=plane_of_elev_r axis=(0.0828 0.0654 0.9944)
            LinearFunction(coefficients=1 0)
        TransformAxis rotation3: coordinates=axial_rot_r axis=(-0.0846 0.9947 -0.0584) LinearFunction(coefficients=1 0)
    CustomJoint glenohumeral_l: socket_parent_frame=scapula_l_offset socket_child_frame=humerus_l_offset
      Coordinate shoulder_elv_l: default_value=0.4363323 range=(-1.570796 2.53) clamped=true
      Coordinate plane_of_elev_l: default_value=1.274472e-8 range=(-1.570796 3.141593) clamped=true
      Coordinate axial_rot_l: default_value=-1.307562e-11 range=(-3.141593 3.141593) clamped=true
      PhysicalOffsetFrame scapula_l_offset: socket_parent=/bodyset/scapula_l translation=(-0.00955 -0.034 -0.009)
      PhysicalOffsetFrame humerus_l_offset: socket_parent=/bodyset/humerus_l translation=(0 0 0)
      SpatialTransform: axes_held_at_zero=(translation1 translation2 translation3)
        TransformAxis rotation1: coordinates=shoulder_elv_l axis=(0.993 -0.0793 0.0879)
            LinearFunction(coefficients=1 0)
        TransformAxis rotation2: coordinates=plane_of_elev_l axis=(-0.0828 -0.0654 0.9944)
            LinearFunction(coefficients=1 0)
        TransformAxis rotation3: coordinates=axial_rot_l axis=(-0.0846 0.9947 0.0584) LinearFunction(coefficients=1 0)
    PinJoint elbow_r: socket_parent_frame=humerus_r_offset socket_child_frame=ulna_r_offset
      Coordinate elbow_flex_r: default_value=0.2618 range=(0 3.1416) clamped=true
      PhysicalOffsetFrame humerus_r_offset: socket_parent=/bodyset/humerus_r translation=(0.013144 -0.286273 -0.009595)
          orientation=(-0.0228627 0.228018 0.0051689)
      PhysicalOffsetFrame ulna_r_offset: socket_parent=/bodyset/ulna_r translation=(0 0 0)
          orientation=(-0.0228627 0.228018 0.0051689)
    PinJoint radioulnar_r: socket_parent_frame=ulna_r_offset socket_child_frame=radius_r_offset
      Coordinate pro_sup_r: default_value=0.0003077219 range=(0 3.1416) clamped=true
      PhysicalOffsetFrame ulna_r_offset: socket_parent=/bodyset/ulna_r translation=(-0.006727 -0.013007 0.026083)
          orientation=(-1.56884 0.056428 1.53614)
      PhysicalOffsetFrame radius_r_offset: socket_parent=/bodyset/radius_r translation=(0 0 0)
          orientation=(-1.56884 0.056428 1.53614)
    UniversalJoint radius_hand_r: socket_parent_frame=radius_r_offset socket_child_frame=hand_r_offset
      Coordinate wrist_flex_r: default_value=-2.251106e-11 range=(-1.5708 1.0472) clamped=true
      Coordinate wrist_dev_r: default_value=3.11665e-8 range=(-0.7853982 0.7853982) clamped=true
      PhysicalOffsetFrame radius_r_offset: socket_parent=/bodyset/radius_r translation=(-0.008797 -0.235841 0.01361)
          orientation=(-1.5708 0 -1.5708)
      PhysicalOffsetFrame hand_r_offset: socket_parent=/bodyset/hand_r translation=(0 0 0)
          orientation=(-1.5708 0 -1.5708)
    PinJoint elbow_l: socket_parent_frame=humerus_l_offset socket_child_frame=ulna_l_offset
      Coordinate elbow_flex_l: default_value=0.2618 range=(0 3.1416) clamped=true
      PhysicalOffsetFrame humerus_l_offset: socket_parent=/bodyset/humerus_l translation=(0.013144 -0.286273 0.009595)
          orientation=(0.0228627 -0.228018 0.0051689)
      PhysicalOffsetFrame ulna_l_offset: socket_parent=/bodyset/ulna_l translation=(0 0 0)
          orientation=(0.0228627 -0.228018 0.0051689)
    PinJoint radioulnar_l: socket_parent_frame=ulna_l_offset socket_child_frame=radius_l_offset
      Coordinate pro_sup_l: default_value=0.0003077219 range=(0 3.1416) clamped=true
      PhysicalOffsetFrame ulna_l_offset: socket_parent=/bodyset/ulna_l translation=(-0.006727 -0.013007 -0.026083)
          orientation=(1.56884 -0.056428 1.53614)
      PhysicalOffsetFrame radius_l_offset: socket_parent=/bodyset/radius_l translation=(0 0 0)
          orientation=(1.56884 -0.056428 1.53614)
    UniversalJoint radius_hand_l: socket_parent_frame=radius_l_offset socket_child_frame=hand_l_offset
      Coordinate wrist_flex_l: default_value=-2.251106e-11 range=(-1.5708 1.0472) clamped=true
      Coordinate wrist_dev_l: default_value=3.11665e-8 range=(-0.7853982 0.7853982) clamped=true
      PhysicalOffsetFrame radius_l_offset: socket_parent=/bodyset/radius_l translation=(-0.008797 -0.235841 -0.01361)
          orientation=(1.5708 0 1.5708)
      PhysicalOffsetFrame hand_l_offset: socket_parent=/bodyset/hand_l translation=(0 0 0)
          orientation=(1.5708 0 1.5708)
  ConstraintSet:
    CoordinateCouplerConstraint patellofemoral_knee_angle_r_con: independent_coordinate_names=knee_angle_r
        dependent_coordinate_name=knee_angle_r_beta scale_factor=1
        coupled_coordinates_function=LinearFunction(coefficients=1 0)
    CoordinateCouplerConstraint patellofemoral_knee_angle_l_con: independent_coordinate_names=knee_angle_l
        dependent_coordinate_name=knee_angle_l_beta scale_factor=1
        coupled_coordinates_function=LinearFunction(coefficients=1 0)
    PointConstraint AC_r: socket_body_1=/bodyset/clavicle_r socket_body_2=/bodyset/scapula_r
        location_body_1=(-0.02924 0.02024 0.12005) location_body_2=(-0.01357 0.00011 -0.01523)
    PointConstraint AC_l: socket_body_1=/bodyset/clavicle_l socket_body_2=/bodyset/scapula_l
        location_body_1=(-0.02924 0.02024 -0.12005) location_body_2=(-0.01357 0.00011 0.01523)
    CoordinateCouplerConstraint aux7jnt_r1_con: independent_coordinate_names=roll2 dependent_coordinate_name=aux7jnt_r1
      coupled_coordinates_function: SimmSpline: x=(-1.74533 1.74533) y=(-0.23911 0.23911)
    CoordinateCouplerConstraint aux7jnt_r2_con: independent_coordinate_names=yaw2 dependent_coordinate_name=aux7jnt_r2
      coupled_coordinates_function: SimmSpline: x=(-1.74533 1.74533) y=(-0.328122 0.328122)
    CoordinateCouplerConstraint aux7jnt_r3_con: independent_coordinate_names=pitch2
        dependent_coordinate_name=aux7jnt_r3
      coupled_coordinates_function: SimmSpline: x=(-1.74533 1.74533) y=(-0.326377 0.326377)
    CoordinateCouplerConstraint aux6jnt_r1_con: independent_coordinate_names=roll2 dependent_coordinate_name=aux6jnt_r1
      coupled_coordinates_function: SimmSpline: x=(-1.74533 1.74533) y=(-0.274017 0.274017)
    CoordinateCouplerConstraint aux6jnt_r2_con: independent_coordinate_names=yaw2 dependent_coordinate_name=aux6jnt_r2
      coupled_coordinates_function: SimmSpline: x=(-1.74533 1.74533) y=(-0.382227 0.382227)
    CoordinateCouplerConstraint aux6jnt_r3_con: independent_coordinate_names=pitch2
        dependent_coordinate_name=aux6jnt_r3
      coupled_coordinates_function: SimmSpline: x=(-1.74533 1.74533) y=(-0.383972 0.383972)
    CoordinateCouplerConstraint aux5jnt_r1_con: independent_coordinate_names=roll2 dependent_coordinate_name=aux5jnt_r1
      coupled_coordinates_function: SimmSpline: x=(-1.74533 1.74533) y=(-0.376991 0.376991)
    CoordinateCouplerConstraint aux5jnt_r2_con: independent_coordinate_names=yaw2 dependent_coordinate_name=aux5jnt_r2
      coupled_coordinates_function: SimmSpline: x=(-1.74533 1.74533) y=(-0.382227 0.382227)
    CoordinateCouplerConstraint aux5jnt_r3_con: independent_coordinate_names=pitch2
        dependent_coordinate_name=aux5jnt_r3
      coupled_coordinates_function: SimmSpline: x=(-1.74533 1.74533) y=(-0.383972 0.383972)
    CoordinateCouplerConstraint aux4jnt_r1_con: independent_coordinate_names=roll2 dependent_coordinate_name=aux4jnt_r1
      coupled_coordinates_function: SimmSpline: x=(-1.74533 1.74533) y=(-0.376991 0.376991)
    CoordinateCouplerConstraint aux4jnt_r2_con: independent_coordinate_names=yaw2 dependent_coordinate_name=aux4jnt_r2
      coupled_coordinates_function: SimmSpline: x=(-1.74533 1.74533) y=(-0.382227 0.382227)
    CoordinateCouplerConstraint aux4jnt_r3_con: independent_coordinate_names=pitch2
        dependent_coordinate_name=aux4jnt_r3
      coupled_coordinates_function: SimmSpline: x=(-1.74533 1.74533) y=(-0.287979 0.287979)
    CoordinateCouplerConstraint aux3jnt_r1_con: independent_coordinate_names=roll2 dependent_coordinate_name=aux3jnt_r1
      coupled_coordinates_function: SimmSpline: x=(-1.74533 1.74533) y=(-0.342085 0.342085)
    CoordinateCouplerConstraint aux3jnt_r2_con: independent_coordinate_names=yaw2 dependent_coordinate_name=aux3jnt_r2
      coupled_coordinates_function: SimmSpline: x=(-1.74533 1.74533) y=(-0.164061 0.164061)
    CoordinateCouplerConstraint aux3jnt_r3_con: independent_coordinate_names=pitch2
        dependent_coordinate_name=aux3jnt_r3
      coupled_coordinates_function: SimmSpline: x=(-1.74533 1.74533) y=(-0.191986 0.191986)
    CoordinateCouplerConstraint aux1jnt_r1_con: independent_coordinate_names=roll1 dependent_coordinate_name=aux1jnt_r1
      coupled_coordinates_function: SimmSpline: x=(-1.74533 1.74533) y=(-0.872665 0.872665)
    CoordinateCouplerConstraint aux1jnt_r2_con: independent_coordinate_names=yaw1 dependent_coordinate_name=aux1jnt_r2
      coupled_coordinates_function: SimmSpline: x=(-1.74533 1.74533) y=(-0.193732 0.193732)
    CoordinateCouplerConstraint aux1jnt_r3_con: independent_coordinate_names=pitch1
        dependent_coordinate_name=aux1jnt_r3
      coupled_coordinates_function: SimmSpline: x=(-1.74533 1.74533) y=(-0.970403 0.970403)
